Givens(A, B, n) :=
    ind_matrix ← A
    ind_free ← B
    for i ∈ 0 .. (n - 1)
        for j ∈ (i + 1) .. n
            m ← sqrt(A[i, i]^2*A[j, i])
            l ← A[j, i]/m
            m ← A[i, i]/m
            for k ∈ 0 .. n
                r ← A[i, k]
                ind_matrix[i, k] ← m*ind_matrix[i, k] + l*ind_matrix[j, k]
                ind_matrix[j, k] ← m*ind_matrix[j, k] - l*r
            r ← ind_free[i]
            ind_free[i] ← m*ind_free[i] + l*ind_free[j]
            ind_free[j] ← m*ind_free[j] - l*r
    answer ← ind_free
    for i ∈ (n - 1) .. 0
        for j ∈ n .. (i + 1)
            answer[i] ← answer[i] - (ind_matrix[i, j]*answer[j])
        answer[i] ← answer[i]/ind_matrix[i, i]
    answer
A := [1.03, 0.993; 0.991, 0.052]
B := [2.53; 2.43]
x0 := [0; 0]
x_giv := Givens(A, B, 1) = [2.45649; -0.00422293]
g(t) := lsolve(transpose(A)*A + t*identity(2), transpose(A)*B + t*x0)
x_regul := g(0.00001) = [2.4518; 0.00468371]
|A*x_giv - B| = 0.00577855
|A*x_regul - B| = 2.61462e-5
